# Use the correct kokkos settings. `neigh half` does not imply the use of a half
# neighbor list, only a change in how contributions are summed together.
# cf https://github.com/lammps/lammps/pull/4412
package kokkos newton on neigh half

# comm_modify     cutoff 17.0

units metal
atom_style atomic/kk
boundary p p p

lattice fcc 4.05
region box block 0 3 0 3 0 3
create_box 1 box
create_atoms 1 box

mass 1 26.9815386

velocity all create 800.0 12345 mom yes rot yes dist gaussian

pair_style metatomic/kk flashmd-energy-model.pt
pair_coeff * * 13

timestep 0.016

fix 0 all metatomic/kk flashmd-dynamics-model.pt types 13

thermo 10
thermo_style custom step temp pe ke etotal

run_style verlet/kk
run 100
