units metal

atom_style atomic

lattice fcc 3.615
region box block 0 4 0 4 0 4
create_box 1 box
create_atoms 1 box
mass 1 63.546

pair_style hybrid/overlay metatomic_1 pet-mad-latest.pt device cuda non_conservative on scale 1.0 metatomic_2 pet-mad-latest.pt device cuda non_conservative on scale -1.0 metatomic pet-mad-latest.pt device cuda non_conservative off scale 1.0
pair_coeff * * metatomic 14
pair_coeff * * metatomic_1 14
pair_coeff * * metatomic_2 14

# pair_style hybrid/overlay metatomic_1 pet-mad-latest.pt device cuda non_conservative off scale 0.5 metatomic pet-mad-latest.pt device cuda non_conservative off scale 0.5
# pair_coeff * * metatomic 14
# pair_coeff * * metatomic_1 14

# pair_style hybrid/overlay morse 6.0 lj/cut 7.5
# pair_coeff * * morse 0.3429 1.444 2.491 6.0
# pair_coeff * * lj/cut 0.01 2.5 7.5

# pair_style lj/cut 7.5
# pair_coeff * * 0.01 2.5 7.5

run_style respa 2 8 hybrid 1 2 2

# pair_style metatomic pet-mad-latest.pt device cuda
# pair_coeff * * 14

# pair_style hybrid/overlay metatomic_1 pet-mad-latest.pt device cuda scale 0.5 metatomic_2 pet-mad-latest.pt device cuda scale 0.5
# pair_coeff * * metatomic_1 14
# pair_coeff * * metatomic_2 14

# pair_style hybrid/overlay metatomic_1 nickel-lj.pt device cuda scale 0.5 metatomic_2 nickel-lj.pt device cuda scale 0.5
# pair_coeff * * metatomic_1 28
# pair_coeff * * metatomic_2 28

timestep 0.004

thermo 10
# thermo_modify format float %.6f

velocity all create 300 87287 mom yes rot yes

fix 1 all nve
# fix 2 all langevin 300.0 300.0 0.1 12345

run 125
